# Задание 1
x := 2
n := 9
y := (sqrt(x^3 + n) + cos(|n*x - 1|)^2)/(nthroot(x^5 + sin(x) + n, 4)*cos(π/4*(x + n))) = -2.33381
# Задание 2
x := 7
y := 10
z := -3
p := if(x > y, sin(x) + 3*|y| - z^2, (y + 3)*ln(|x + 1|)/sqrt(z^2 + 1)) = 8.5485
q := if(x > y and x < 1, cos(x) + 2*|y + 1|, (x*y + 3)/sqrt(y^2 + 5)) = 7.12407
w := if(x < y or y ≥ 10, x^2 + 2*(y*x + 1) - z, (x^-3*y^2 + 3)*sqrt(z^2 + 7)) = 194
# Задание 3
x := -2, -1.6 .. 2  # '
n := 9
f(x) := (x^2 - n*x + sin(x))*sqrt(|x - cos(n*x)|)
f(x) = [34.3999; 18.4768; 11.34; 8.45272; 2.37562; 0; -3.47386; -2.55778; -9.95188; -14.7836; -15.1518]
# Задание 4
n := 10
a := -3*n = -30
b := 3*n = 30
A := runif(3, a, b)
B := runif(3, a, b)
C := runif(3, a, b)
A = [-29.9239; -18.4006; 5.10037]
B = [-8.98151; 19.3703; -19.5523]
B1 := -B
B = [-8.98151; 19.3703; -19.5523]
A*B = -187.387
B1×C = [704.819; 467.124; 139.011]
(A×B)*C = 28977.3
# Без шаблонов
A[0]*B[0] + A[1]*B[1] + A[2]*B[2] = -187.387
V := [B[1]*C[2] - B[2]*C[1], B[2]*C[0] - B[0]*C[2], B[0]*C[1] - B[1]*C[0]]
V = [-704.819, -467.124, -139.011]
w := [A[1]*B[2] - A[2]*B[1]; A[2]*B[0] - A[0]*B[2]; A[0]*B[1] - A[1]*B[0]]
w1 := w[0]*C[0] + w[1]*C[1] + w[2]*C[2]
w1 = 28977.3
dA := sqrt(A[0]^2 + A[1]^2 + A[2]^2)
dA = 35.497
dB := sqrt(B[0]^2 + B[1]^2 + B[2]^2)
dB = 28.9511
dC := sqrt(C[0]^2 + C[1]^2 + C[2]^2)
dC = 29.9805
d := if(|A| > |B| and |A| > |C|, "Это А", if(|B| > |C| and |B| > |A|, "Это B", "Это C"))
d = "Это А"
# Массив M
N := 10
i := 0 .. N - 1
j := 0 .. N - 1
M[i, j] := round(-10 + 20*rnd(1))
M = [
    -7, 10, -8, -10, 1, 2, -7, -1, -9, 6;
    0, 8, 9, 1, -1, 7, 6, 10, 2, -5;
    7, -2, 4, -10, -4, 2, 7, 0, 5, -1;
    5, 2, 5, 1, -7, -1, 0, 5, -7, 0;
    4, -7, -7, 4, -1, 9, -7, 6, -6, 6;
    -7, 5, -4, 4, 4, -8, 7, 0, -1, 9;
    1, -1, 7, -1, 10, 5, -6, 7, 0, -9;
    1, 1, 7, 3, 7, -8, -4, -4, -7, 7;
    2, -5, -10, 6, -6, 1, -8, 5, 1, -1;
    4, -1, 2, 3, 0, 4, -6, -6, -1, -8
]
Сумма
s := sum(sum(M[i, j], j = 0 .. 9), i = 0 .. 9)
s = 27
# Сумма положительных
S := sum(sum(if(M[i, j] > 0, M[i, j], 0), j = 0 .. 9), i = 0 .. 9)
S = 247
# Сумма отрицательных
S := sum(sum(if(M[i, j] < 0, M[i, j], 0), j = 0 .. 9), i = 0 .. 9)
S = -220
X*Y
X := M[:, 0]
Y := transpose(M)[:, N - 1]
Y = [4; -1; 2; 3; 0; 4; -6; -6; -1; -8]
X = [-7; 0; 7; 5; 4; -7; 1; 1; 2; 4]
X*Y = -73
# Задание 5
y(x) := e^(-(|x|/3))*cos(x)
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# Задание 6
Δx := 0.25
x := -9, -9 + Δx .. 9
f(x) := if(x < 0, e^x*x^3, e^(-x)*x^3)
f(x) = [
    -0.0899657; -0.106157; -0.124955; -0.146701; -0.171757; -0.200504; -0.233332; -0.270632; -0.312776; -0.3601
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]
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# Задание 7
Δx := π/4
s := 0, 1 .. 15
x[1] := -2*π
x1[s] := x[1] + Δx*s
g(x1) := sqrt(|x1|)*sin(x1)
X := x1
g(x1) = [0; 2.69879; 3.81667; 2.69879; 0; -2.69879; -3.81667; -2.69879; 0; 2.69879; 3.81667; 2.69879; 0; -2.69879; -3.81667; -2.69879]
X = [-6.28319; -5.49779; -4.71239; -3.92699; -3.14159; -2.35619; -1.5708; -0.785398; 0; 0.785398; 1.5708; 2.35619; 3.14159; 3.92699; 4.71239; 5.49779]
Y := g(X)
filename2 := "Y.txt"
filename1 := "X.txt"
WRITEPRN(filename1) := X
WRITEPRN(filename2) := Y
YY := READPRN(filename2)
XX := READPRN(filename1)
XX = [-6.283; -5.498; -4.712; -3.927; -3.142; -2.356; -1.571; -0.7854; 0; 0.7854; 1.571; 2.356; 3.142; 3.927; 4.712; 5.498]
YY = [0; 2.699; 3.817; 2.699; 0; -2.699; -3.817; -2.699; 0; 2.699; 3.817; 2.699; 0; -2.699; -3.817; -2.699]
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# Задание 8
x := -3, -2.9 .. 3
q(x) := e^(-x^2)
q1(x) := d/dx(q(x))
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# Задание 9
f(x, y) := sin(sqrt(x^2 + y^2))/sqrt(x^2 + y^2)
# [component: inputs f]
# Задание 10
x := -5, -4.5 .. 5
f(x) := x^2 + (x - 2)*sin(x) - 5
f(-1.329) = -0.00160155
f(2.2) = 0.00169928
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root(f(x), x, -2, 0) = -1.32936
root(f(x), x, 0, 3)
# Задание 11
x := -4, -3.8 .. 4
f(x) := x^2 + x*sin(2*x) - (x - 5)*cos(x)
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root(f(x), x, -4, -2) = -2.97354
root(f(x), x, -2, 4) = -1.93283
f(-2.974) = 0.00411823
f(-1.933) = -0.00110412
# Задание 12
n := 5
P := [-3*n; 3 - 4*n; 4 - n; 1]
x^3 + (4 - n)*x^2 + (3 - 4*n)*x - 3*n
x := polyroots(P)
x = [-3; -1; 5]
# Задание 13
n := 1
# 1.
A := [n, n + 1, n + 2; n - 3, n - 2, n; n - 1, n, n + 1]
B := [6*n + 8; 6*n - 7; 6*n + 2]
X := A^-1*B
X = [1; 2; 3]
# 2.
Given
n*x + (n + 1)*y + (n + 2)*z == 6*n + 8
(n - 3)*x + (n - 2)*y + n*z == 6*n - 7
(n - 1)*x + n*y + (n + 1)*z == 6*n + 2
Find(x, y, z) → [1; 2; 3]
# 3.
x := 1
y := 2
z := 3
n*x + (n + 1)*y + (n + 2)*z = 14
(n - 3)*x + (n - 2)*y + n*z = -1
(n - 1)*x + n*y + (n + 1)*z = 8
# Задание 15
x := 0, 0.2 .. 10
f(x) := x*sin(x)
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Минимумы
x := 4
x := Minimize(f, x)
x = 4.91318
f(4.913) = -4.81447
Максимумы
x := 1
x := Maximize(f, x)
x = 2.02876
f(x) = 1.81971
x := 6
x := Maximize(f, x)
x = 7.97867
f(x) = 7.91673
# задание 14
t := 0, 0.01 .. 2*π
x^2/81 + y^2/16 == 1
(x - 9)^2 + (y - 2)^2 == 25
xOkr(t) := 9 + 5*cos(t)
xEl(t) := 9*cos(t)
yOkr(t) := 2 + 5*sin(t)
yEl(t) := 4*sin(t)
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x := 5
y := 4
Given
x^2/81 + y^2/16 == 1
(x - 9)^2 + (y - 2)^2 == 25
V := Find(x, y)
V = [4.23934; 3.52845]
x1 := 8
y1 := 0
Given
x1^2/81 + y1^2/16 == 1
(x1 - 9)^2 + (y1 - 2)^2 == 25
V := Find(x1, y1)
V = [6.9308; -2.55175]
