x := 2
n := 9
y(n) := (sqrt(x^3 + n) + cos(|n*x - 1|)^2)/(sqrt(x^5 + sin(x) + n)*cos(π*(x + n)/4))
y(n) = -0.917249
# задание 2
x := 7
y := 10
z := -3
p(x, y, z) := if(x > y, sin(x) + 2*|y| - z^2, (y + 3)*ln(x + 1)/sqrt(z^2 + 1))
p(x, y, z) = 8.5485
q(x, y, z) := if((x > y) and (x < 1), cos(x) + 2*|y + 1| - z, (x*y + 3)/sqrt(y^2 + 5))
q(x, y, z) = 7.12407
w(x, y, z) := if((x < y) or (y ≥ 10), x^2 + 2*(x*y + 1) - z, (x^-3*y^2 + 3)*sqrt(z^2 + 7))
w(x, y, z) = 194
# задание 3
x2 := -2, -1.6 .. 2
n2 := 1 .. 10
f(x2, n2) := (x2^2 - x2*n2 + sin(x2))*sqrt(|x2 - cos(n2*x2)|)
f(x2, n2) = [
    6.40671; 3.96101; 2.13485; 0.884082; 0.196062; 0; 0.107857; 0.17913; 1.07268; 2.5012
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]
# задание 4
n := 10
b := 3*n
a := -3*n
A := runif(3, a, b) = [-29.9239; -18.4006; 5.10037]
B := runif(3, a, b) = [-8.98151; 19.3703; -19.5523]
C := runif(3, a, b) = [12.6297; -11.7608; -24.5153]
s := (A[0]*B[0] + A[1]*B[1] + A[2]*B[2]) = -187.387
s1 := transpose(A)*B = -187.387
s := A*B = -187.387
v := B×C = [-704.819; -467.124; -139.011]
v := [B[1]*C[2] - B[2]*C[1]; B[0]*C[2] - B[2]*C[0]; B[0]*C[1] - B[1]*C[0]] = [-704.819; 467.124; -139.011]
w := (A×B)*C = 28977.3
al := sqrt(A*A) = 35.497
bl := sqrt(B*B) = 28.9511
cl := sqrt(C*C) = 29.9805
max := if(al > bl and al > cl, "Это А", "Это не A") = "Это А"
max := if(bl > al and bl > cl, "Это B", "Это не B") = "Это не B"
max := if(cl > bl and cl > al, "Это C", "Это не C") = "Это не C"
Mcol := runif(10, a, b) = [-21.1612; 29.3105; -22.8552; -29.4646; 1.89985; 6.10585; -20.025; -2.95285; -26.5766; 16.9992]
mm := transpose(Mcol) = [-21.1612, 29.3105, -22.8552, -29.4646, 1.89985, 6.10585, -20.025, -2.95285, -26.5766, 16.9992]
M := Mcol*mm = [
    447.796, -620.245, 483.644, 623.507, -40.2031, -129.207, 423.754, 62.4858, 562.394, -359.722;
    -620.245, 859.106, -669.898, -863.624, 55.6856, 178.966, -586.944, -86.5494, -778.975, 498.254;
    483.644, -669.898, 522.361, 673.421, -43.4215, -139.55, 457.676, 67.4879, 607.415, -388.519;
    623.507, -863.624, 673.421, 868.165, -55.9784, -179.907, 590.03, 87.0046, 783.071, -500.874;
    -40.2031, 55.6856, -43.4215, -55.9784, 3.60943, 11.6002, -38.0445, -5.60996, -50.4916, 32.2958;
    -129.207, 178.966, -139.55, -179.907, 11.6002, 37.2814, -122.27, -18.0296, -162.273, 103.794;
    423.754, -586.944, 457.676, 590.03, -38.0445, -122.27, 401.002, 59.1308, 532.198, -340.409;
    62.4858, -86.5494, 67.4879, 87.0046, -5.60996, -18.0296, 59.1308, 8.7193, 78.4768, -50.1959;
    562.394, -778.975, 607.415, 783.071, -50.4916, -162.273, 532.198, 78.4768, 706.318, -451.78;
    -359.722, 498.254, -388.519, -500.874, 32.2958, 103.794, -340.409, -50.1959, -451.78, 288.971
]
i := 0 .. 9
j := 0 .. 9
sumEl := sum(sum(M[i, j], j), i) = 4722.47
SumP := sum(sum(M[i, j]*(M[i, j] > 0), j), i)
SumM := sum(sum(M[i, j]*(M[i, j] < 0), j), i)
SumP = 18087.9
SumM = -13365.4
X := M[:, 0]
Y := transpose(M)[:, cols(M) - 1]
X = [447.796; -620.245; 483.644; 623.507; -40.2031; -129.207; 423.754; 62.4858; 562.394; -359.722]
Y = [-359.722; 498.254; -388.519; -500.874; 32.2958; 103.794; -340.409; -50.1959; -451.78; 288.971]
RES := X*Y = -1490448
# задание 5
x := -3*π .. 3*π
y(x) := e^(-(|x|/3))*cos(x)
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# задание 6
x := -9, -9 + 0.25 .. 9
f(x) := if(x < 0, e^x*x^3, e^(-x)*x^3)
x = [
    -9; -8.75; -8.5; -8.25; -8; -7.75; -7.5; -7.25; -7; -6.75
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]
f(x) = [
    -0.0899657; -0.106157; -0.124955; -0.146701; -0.171757; -0.200504; -0.233332; -0.270632; -0.312776; -0.3601
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]
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# задание 7
g(x) := sqrt(|x|)*sin(x)
x1 := -2*π
x2 := 2*π
Δx := π/4
Nx := (x2 - x1)/Δx = 16
i := 0 .. Nx
x[i] := x1 + i*Δx
Y[i] := g(x[i])
X[i] := x[i]
X[i] = [-6.28319; -5.49779; -4.71239; -3.92699; -3.14159; -2.35619; -1.5708; -0.785398; 0; 0.785398; 1.5708; 2.35619; 3.14159; 3.92699; 4.71239; 5.49779; 6.28319]
Y[i] = [0; 1.65798; 2.1708; 1.40125; 0; -1.0854; -1.25331; -0.626657; 0; 0.626657; 1.25331; 1.0854; 0; -1.40125; -2.1708; -1.65798; 0]
WRITEPRN("X.txt") := X
WRITEPRN("Y.txt") := Y
XX := READPRN("X.txt")
YY := READPRN("Y.txt")
XX = [-6.283; -5.498; -4.712; -3.927; -3.142; -2.356; -1.571; -0.7854; 0; 0.7854; 1.571; 2.356; 3.142; 3.927; 4.712; 5.498; 6.283]
YY = [0; 1.658; 2.171; 1.401; 0; -1.085; -1.253; -0.6267; 0; 0.6267; 1.253; 1.085; 0; -1.401; -2.171; -1.658; 0]
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# задание 8
q(x) := e^(-x^2)
x := -3, -2.9 .. 3
p(x) := d/dx(q(x))
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# задание 9
f(x, y) := sin(sqrt(x^2 + y^2))/sqrt(x^2 + y^2)
# [component: inputs f]
# задание 10
f(x) := x^2 + (x - 2)*sin(x) - 5
x1 := -5
x2 := 5
Δx := 0.1
x := x1, x1 + Δx .. x2
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x := -4
x1 := root(f(x), x)
x := 2
x1 = -1.32936
x2 := root(f(x), x)
f(x1) = 0
x2 = 2.19967
f(x2) = 3.52607e-13
# задание 11
f(x) := x^2 + x*sin(2*x) - (x - 5)*cos(x)
x1 := -4
x2 := 4
Δx := 0.1
x := x1, x1 + Δx .. x2
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x1 := root(f(x), x, -4, -2)
x1 = -2.97354
f(x1) = -1.77636e-15
x2 := root(f(x), x, -2, 0)
x2 = -1.93283
f(x2) = 0
# задание 12
n := 6
f(x) := x^3 + (4 - n)*x^2 + (3 - 4*n)*x - 3*n
V := [-3*n; 3 - 4*n; 4 - n; 1]
V = [-18; -21; -2; 1]
R := polyroots(V)
R = [-3; -1; 6]
# задание 13
n := 3
A := [n, n + 1, n + 2; n - 3, n - 2, n; n - 1, n, n + 1]
|A| = -1
A = [3, 4, 5; 0, 1, 3; 2, 3, 4]
B := [6*n + 8; 6*n - 7; 6*n + 2]
B = [26; 11; 20]
X := A^-1*B
x := X[0] = 1
A*X = [26; 11; 20]
y := X[1] = 2
X = [1; 2; 3]
z := X[2] = 3
Given
x := 0
y := 0
z := 0
n*x + (n + 1)*y + (n + 2)*z == 6*n + 8
(n - 3)*x + (n - 2)*y + n*z == 6*n - 7
(n - 1)*x + n*y + (n + 1)*z == 6*n + 2
[rx; ry; rz] := Find(x, y, z) = [1; 2; 3]
# задание 14
t := 0, 0.01 .. 2*π
x^2/81 + y^2/16 == 1
(x - 9)^2 + (y - 2)^2 == 25
xOkr(t) := 9 + 5*cos(t)
xEl(t) := 9*cos(t)
yOkr(t) := 2 + 5*sin(t)
yEl(t) := 4*sin(t)
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x := 5
y := 0
Given
x^2/81 + y^2/16 == 1
(x - 9)^2 + (y - 2)^2 == 25
V := Find(x, y)
V = [6.9308; -2.55175]
x := 8
y := 0
Given
x^2/81 + y^2/16 == 1
(x - 9)^2 + (y - 2)^2 == 25
V := Find(x, y)
V = [6.9308; -2.55175]
# задание 15
f(x) := x*sin(x)
x := 0, 0.1 .. 10
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x := 2
x1_max := Maximize(f, x)
x1_max = 2.02876
y1_max := f(x1_max)
y1_max = 1.81971
x := 5
x1_min := Minimize(f, x)
x1_min = 4.91318
y1_min := f(x1_min)
y1_min = -4.81447
x := 8
x2_max := Maximize(f, x)
x2_max = 7.97867
y2_max := f(x2_max)
y2_max = 7.91673
