x := READPRN("C:/Users/Manmade/Desktop/test/lab11/Lab01/X_bez.txt")
y := READPRN("C:/Users/Manmade/Desktop/test/lab11/Lab01/Y_bez.txt")
xB := READPRN("C:/Users/Manmade/Desktop/test/lab11/Lab01/XB_bez.txt")
yB := READPRN("C:/Users/Manmade/Desktop/test/lab11/Lab01/YB_bez.txt")
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