Лагранж
x := READPRN("C:/Users/Manmade/Desktop/5sem/CGB/Code/Lab_11/lab11/Lab01/X_lagr.txt")
y := READPRN("C:/Users/Manmade/Desktop/5sem/CGB/Code/Lab_11/lab11/Lab01/Y_lagr.txt")
yL := READPRN("C:/Users/Manmade/Desktop/5sem/CGB/Code/Lab_11/lab11/Lab01/YL_lagr.txt")
xL := READPRN("C:/Users/Manmade/Desktop/5sem/CGB/Code/Lab_11/lab11/Lab01/XL_lagr.txt")
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Безье
x := READPRN("C:/Users/Manmade/Desktop/5sem/CGB/Code/Lab_11/lab11/Lab01/X1_bez.txt")
y := READPRN("C:/Users/Manmade/Desktop/5sem/CGB/Code/Lab_11/lab11/Lab01/Y1_bez.txt")
xB := READPRN("C:/Users/Manmade/Desktop/5sem/CGB/Code/Lab_11/lab11/Lab01/XB1_bez.txt")
yB := READPRN("C:/Users/Manmade/Desktop/5sem/CGB/Code/Lab_11/lab11/Lab01/YB1_bez.txt")
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x := READPRN("C:/Users/Manmade/Desktop/5sem/CGB/Code/Lab_11/lab11/Lab01/X2_bez.txt")
y := READPRN("C:/Users/Manmade/Desktop/5sem/CGB/Code/Lab_11/lab11/Lab01/Y2_bez.txt")
xB := READPRN("C:/Users/Manmade/Desktop/5sem/CGB/Code/Lab_11/lab11/Lab01/XB2_bez.txt")
yB := READPRN("C:/Users/Manmade/Desktop/5sem/CGB/Code/Lab_11/lab11/Lab01/YB2_bez.txt")
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x := READPRN("C:/Users/Manmade/Desktop/5sem/CGB/Code/Lab_11/lab11/Lab01/X3_bez.txt")
y := READPRN("C:/Users/Manmade/Desktop/5sem/CGB/Code/Lab_11/lab11/Lab01/Y3_bez.txt")
xB := READPRN("C:/Users/Manmade/Desktop/5sem/CGB/Code/Lab_11/lab11/Lab01/XB3_bez.txt")
yB := READPRN("C:/Users/Manmade/Desktop/5sem/CGB/Code/Lab_11/lab11/Lab01/YB3_bez.txt")
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x := READPRN("C:/Users/Manmade/Desktop/5sem/CGB/Code/Lab_11/lab11/Lab01/X4_bez.txt")
y := READPRN("C:/Users/Manmade/Desktop/5sem/CGB/Code/Lab_11/lab11/Lab01/Y4_bez.txt")
xB := READPRN("C:/Users/Manmade/Desktop/5sem/CGB/Code/Lab_11/lab11/Lab01/XB4_bez.txt")
yB := READPRN("C:/Users/Manmade/Desktop/5sem/CGB/Code/Lab_11/lab11/Lab01/YB4_bez.txt")
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